*Heading
** Job name: DefaultLB21102025 Model name: Model-1
** Generated by: Abaqus/CAE 2020
*Preprint, echo=NO, model=NO, history=NO, contact=NO
**
** PARTS
**
*Part, name=original_1010
*Node
      1,   1.15537035,  0.185645744, -0.0627688766
      2,   1.15537035,  0.185645744, 0.0632311255
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*Element, type=C3D4
    1, 20877, 20878, 11855, 20879
    2, 20877, 11855, 20880,  7300
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*Nset, nset=_PickedSet2, internal, generate
     1,  22302,      1
*Elset, elset=_PickedSet2, internal, generate
     1,  70584,      1
** Section: Section-1
*Solid Section, elset=_PickedSet2, material=UHSS
,
*End Part
**
**
** ASSEMBLY
**
*Assembly, name=Assembly
**
*Instance, name=original_1010-1, part=original_1010
*End Instance
**
*End Assembly
**
** MATERIALS
**
*Material, name=UHSS
*Density
7850.,
*Elastic
 2.1e+11, 0.3
** ----------------------------------------------------------------
**
** STEP: modal
**
*Step, name=modal, nlgeom=NO, perturbation
*Frequency, eigensolver=Lanczos, sim, acoustic coupling=on, normalization=mass
10, , , , ,
**
** OUTPUT REQUESTS
**
*Restart, write, frequency=0
**
** FIELD OUTPUT: F-Output-1
**
*Output, field, variable=PRESELECT
*End Step
** STEP: Matrix gen
*Step, name=matrix-step, nlgeom=NO
*Matrix generate, stiffness, mass
*Matrix output, stiffness=YES, mass=YES, format=coordinate
*End Step
