*Heading
** Job name: Job-3 Model name: Model-1
** Generated by: Abaqus/CAE 2020
*Preprint, echo=NO, model=NO, history=NO, contact=NO
**
** PARTS
**
*Part, name="optimized0407 (1)"
*Node
      1,   1.22811878,  0.220858067, 0.0303284153
      2,   1.22742665,  0.221489027, 0.0301399268
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*Element, type=C3D4
    1, 14434, 14254, 14435, 14436
    2, 14437,   956, 14438,   157
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*Nset, nset=_PickedSet2, internal, generate
     1,  14973,      1
*Elset, elset=_PickedSet2, internal, generate
     1,  46113,      1
** Section: Section-1
*Solid Section, elset=_PickedSet2, material=Material-1
,
*End Part
**
**
** ASSEMBLY
**
*Assembly, name=Assembly
**
*Instance, name="optimized0407 (1)-1", part="optimized0407 (1)"
*End Instance
**
*End Assembly
**
** MATERIALS
**
*Material, name=Material-1
*Density
7850.,
*Elastic
 2.1e+11, 0.3
** ----------------------------------------------------------------
**
** STEP: eigenop
**
*Step, name=eigenop, nlgeom=NO, perturbation
*Frequency, eigensolver=Lanczos, sim, acoustic coupling=on, normalization=mass
10, , , , ,
**
** OUTPUT REQUESTS
**
*Restart, write, frequency=0
**
** FIELD OUTPUT: F-Output-1
**
*Output, field, variable=PRESELECT
*End Step
** STEP: Matrix gen
*Step, name=matrix-step, nlgeom=NO
*Matrix generate, stiffness, mass
*Matrix output, stiffness=YES, mass=YES, format=coordinate
*End Step
